<?xml version="1.0" encoding="UTF-8"?>
<neuroml xmlns="http://www.neuroml.org/schema/neuroml2"
         xmlns:xsi="http://www.w3.org/2001/XMLSchema-instance"
         xsi:schemaLocation="http://www.neuroml.org/schema/neuroml2 https://raw.github.com/NeuroML/NeuroML2/master/Schemas/NeuroML2/NeuroML_v2beta.xsd"
         id="AdExBurstSilent">

<notes>NeuroML 2 file containing an abstract cell definition</notes>

<adExIaFCell id="AdExBurstSilent"
             C="281pF" gL="30nS" EL="-70.6mV" reset="-47.2mV" VT = "-50.4mV"
             thresh = "-40.4mV" delT="2mV" tauw="40ms"
             a ="4nS"   b = "0.08nA" refract="2.5ms"/>

</neuroml>
