<?xml version="1.0" encoding="UTF-8"?>
<neuroml xmlns="http://www.neuroml.org/schema/neuroml2"
         xmlns:xsi="http://www.w3.org/2001/XMLSchema-instance"
         xsi:schemaLocation="http://www.neuroml.org/schema/neuroml2 http://neuroml.svn.sourceforge.net/viewvc/neuroml/NeuroML2/Schemas/NeuroML2/NeuroML_v2alpha.xsd"
         id="IaFSpont">

	<notes>NeuroML 2 file containing an abstract cell definition</notes>

	<iafCell id="IaFSpont" leakReversal="-50mV" thresh="-55mV" reset="-70mV" C="0.2nF" leakConductance="0.01uS"/>

</neuroml>
