<?xml version="1.0" encoding="UTF-8"?>
<neuroml xmlns="http://www.neuroml.org/schema/neuroml2"
         xmlns:xsi="http://www.w3.org/2001/XMLSchema-instance"
         xsi:schemaLocation="http://www.neuroml.org/schema/neuroml2 https://raw.github.com/NeuroML/NeuroML2/master/Schemas/NeuroML2/NeuroML_v2beta.xsd"
         id="KCond_lowQ10ExpTemp_NML2">

    <notes>NeuroML 2 file containing a single ionChannel</notes>

    <ionChannel id="KCond_lowQ10ExpTemp_NML2" type="ionChannelHH" conductance="36pS" species="k">
        <notes>Simple example of K conductance.</notes>
        <!--Ohmic channel with 2 gates. Note a default single channel
	    conductance of 10 pS has been added...-->
        <gateHHrates id="n" instances="4">
	  <q10Settings type="q10ExpTemp" q10Factor="3"
		       experimentalTemp="25degC" />
            <forwardRate type="HHExpLinearRate" rate="0.1per_ms" midpoint="-55mV" scale="10mV"/>
            <reverseRate type="HHExpRate" rate="0.125per_ms" midpoint="-65mV" scale="-80mV"/>
        </gateHHrates>
    </ionChannel>
</neuroml>
