<?xml version="1.0" encoding="UTF-8"?>
<neuroml xmlns="http://www.neuroml.org/schema/neuroml2"
         xmlns:xsi="http://www.w3.org/2001/XMLSchema-instance"
         xsi:schemaLocation="http://www.neuroml.org/schema/neuroml2 https://raw.github.com/NeuroML/NeuroML2/master/Schemas/NeuroML2/NeuroML_v2beta.xsd"
         id="NaCond_lowQ10ExpTemp_NML2">

    <notes>NeuroML 2 file containing a single ionChannel</notes>

    <ionChannel id="NaCond_lowQ10ExpTemp_NML2" type="ionChannelHH" conductance="10pS" species="na">
        <notes>Simple example of Na conductance in squid giant axon. Based on channel from Hodgkin and Huxley 1952</notes>
        <!--Ohmic channel with 2 gates. Note a default single channel conductance of 10 pS has been added...-->
        <gateHHrates id="m" instances="3">
	  <q10Settings type="q10ExpTemp" q10Factor="3"
		       experimentalTemp="25degC" />
            <forwardRate type="HHExpLinearRate" rate="1per_ms" scale="10mV" midpoint="-40mV"/>
            <reverseRate type="HHExpRate" rate="4per_ms" scale="-18mV" midpoint="-65mV"/>
        </gateHHrates>
        <gateHHrates id="h" instances="1">
	  <q10Settings type="q10ExpTemp" q10Factor="3"
		       experimentalTemp="25degC"/>
            <forwardRate type="HHExpRate" rate="0.07per_ms" scale="-20mV" midpoint="-65mV"/>
            <reverseRate type="HHSigmoidRate" rate="1per_ms" scale="10mV" midpoint="-35mV"/>
        </gateHHrates>
    </ionChannel>
</neuroml>
