<?xml version="1.0" encoding="UTF-8"?>
<neuroml xmlns="http://www.neuroml.org/schema/neuroml2" xmlns:xsi="http://www.w3.org/2001/XMLSchema-instance" xsi:schemaLocation="http://www.neuroml.org/schema/neuroml2  https://raw.github.com/NeuroML/NeuroML2/development/Schemas/NeuroML2/NeuroML_v2beta1.xsd" id="network_Ex6_CerebellumDemo">

    <notes>

Network structure (NeuroML 2beta1) for project: Ex6_CerebellumDemo saved with neuroConstruct v1.7.0 on: 11:51:37, 30-Oct-13

Cell Group: PurkinjeCells contains 4 cells
Cell Group: GranuleCells contains 80 cells
Cell Group: MossyFibers contains 12 cells
Cell Group: GolgiCells contains 4 cells

Network connection: NetConn_2 contains 33 individual synaptic connections
Network connection: NetConn_GranuleCells_GolgiCells contains 80 individual synaptic connections
Network connection: NetConn_1 contains 324 individual synaptic connections

    </notes>

    <include href="GolgiCell.cell.nml"/>
    <include href="GranuleCell.cell.nml"/>
    <include href="MossyFiber.cell.nml"/>
    <include href="PurkinjeCell.cell.nml"/>
    <include href="KConductance.channel.nml"/>
    <include href="PassiveCond.channel.nml"/>
    <include href="NaConductance.channel.nml"/>
    <include href="GranGolgiSyn.synapse.nml"/>
    <include href="GranPurkSyn.synapse.nml"/>
    <include href="MFGranSyn.synapse.nml"/>

    <spikeGeneratorPoisson id="Input_0" averageRate="50.0 per_ms"/>

    <network id="network_Ex6_CerebellumDemo" type="networkWithTemperature" temperature="25.0 degC">

        <population id="PurkinjeCells" component="PurkinjeCell" type="populationList">
            <instance id="0">
                <location x="91.6996" y="176.4876" z="75.88908"/>
            </instance>
            <instance id="1">
                <location x="34.232094" y="173.79414" z="115.74309"/>
            </instance>
            <instance id="2">
                <location x="121.37791" y="183.10812" z="83.03014"/>
            </instance>
            <instance id="3">
                <location x="51.874138" y="165.61873" z="59.65896"/>
            </instance>
        </population>

        <population id="GranuleCells" component="GranuleCell" type="populationList">
            <instance id="0">
                <location x="65.01428" y="107.62881" z="195.38687"/>
            </instance>
            <instance id="1">
                <location x="115.699684" y="145.2819" z="21.86352"/>
            </instance>
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        </population>

        <population id="MossyFibers" component="MossyFiber" type="populationList">
            <instance id="0">
                <location x="188.14444" y="120.12148" z="7.5876713"/>
            </instance>
            <instance id="1">
                <location x="67.11961" y="117.698685" z="139.68835"/>
            </instance>
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        </population>

        <population id="GolgiCells" component="GolgiCell" type="populationList">
            <instance id="0">
                <location x="42.109966" y="119.53743" z="58.605637"/>
            </instance>
            <instance id="1">
                <location x="56.29535" y="127.77073" z="107.776115"/>
            </instance>
            <instance id="2">
                <location x="167.42213" y="120.83924" z="83.001625"/>
            </instance>
            <instance id="3">
                <location x="180.74382" y="128.72433" z="32.79717"/>
            </instance>
        </population>

        <population id="Input_0_population" component="Input_0" size="12"/>    <projection id="NetConn_2" presynapticPopulation="GranuleCells" postsynapticPopulation="PurkinjeCells" synapse="GranPurkSyn">
            <connection id="0" preCellId="../GranuleCells/1/GranuleCell" postCellId="../PurkinjeCells/3/PurkinjeCell" preSegmentId="21" preFractionAlong="0.9337265" postSegmentId="34" postFractionAlong="0.6493082"/>
            <connection id="1" preCellId="../GranuleCells/2/GranuleCell" postCellId="../PurkinjeCells/1/PurkinjeCell" preSegmentId="21" preFractionAlong="0.81408995" postSegmentId="39" postFractionAlong="0.04343994"/>
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        </projection>

        <projection id="NetConn_GranuleCells_GolgiCells" presynapticPopulation="GranuleCells" postsynapticPopulation="GolgiCells" synapse="GranGolgiSyn">
            <connection id="0" preCellId="../GranuleCells/0/GranuleCell" postCellId="../GolgiCells/2/GolgiCell" preSegmentId="12" preFractionAlong="0.5275757" postSegmentId="24" postFractionAlong="0.106654234"/>
            <connection id="1" preCellId="../GranuleCells/1/GranuleCell" postCellId="../GolgiCells/1/GolgiCell" preSegmentId="19" preFractionAlong="0.7320725" postSegmentId="44" postFractionAlong="0.078080244"/>
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        </projection>

        <projection id="Input_0_projection">
    <connection id="0"/>

    <connection id="1"/>

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    </projection>    <projection id="NetConn_1" presynapticPopulation="MossyFibers" postsynapticPopulation="GranuleCells" synapse="MFGranSyn">
            <connection id="0" preCellId="../MossyFibers/10/MossyFiber" postCellId="../GranuleCells/0/GranuleCell" preSegmentId="0" preFractionAlong="0.3059578" postSegmentId="0" postFractionAlong="0.5"/>
            <connection id="1" preCellId="../MossyFibers/8/MossyFiber" postCellId="../GranuleCells/0/GranuleCell" preSegmentId="0" preFractionAlong="0.2874995" postSegmentId="0" postFractionAlong="0.5"/>
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        </projection>

    </network>

</neuroml>
