<?xml version="1.0" encoding="UTF-8"?>
<neuroml xmlns="http://www.neuroml.org/schema/neuroml2" xmlns:xsi="http://www.w3.org/2001/XMLSchema-instance" xsi:schemaLocation="http://www.neuroml.org/schema/neuroml2  https://raw.githubusercontent.com/NeuroML/NeuroML2/development/Schemas/NeuroML2/NeuroML_v2beta4.xsd" id="MossyFiber">

    <include href="KConductance.channel.nml"/>

    <include href="NaConductance.channel.nml"/>

    <include href="PassiveCond.channel.nml"/>

    <cell id="MossyFiber">

        <notes>A simple cell for testing purposes only</notes>

        <morphology id="morphology_MossyFiber">

            <segment id="0" name="Rosette">
                <proximal x="0.0" y="0.0" z="0.0" diameter="10.0"/>
                <distal x="0.0" y="20.0" z="0.0" diameter="10.0"/>
            </segment>

            <segmentGroup id="Soma" neuroLexId="sao864921383">    <!--
                This group contains an unbranched set of segments, and all of the segmentGroups marked with
                neuroLexId = sao864921383 form a non-overlapping set of all of the segments.
                These segmentGroups correspond to the 'cables' of NeuroML v1.8.1. -->

                <member segment="0"/>
            </segmentGroup>

            <segmentGroup id="all">
                <include segmentGroup="Soma"/>
            </segmentGroup>

            <segmentGroup id="soma_group" neuroLexId="GO:0043025">    <!--Soma group-->

                <include segmentGroup="Soma"/>
            </segmentGroup>

        </morphology>

            <!--Adding the biophysical parameters-->

        <biophysicalProperties id="biophys">

            <membraneProperties>

                <channelDensity condDensity="36.0 mS_per_cm2" id="KConductance_all" ionChannel="KConductance" ion="k" erev="-77.0 mV"/>

                <channelDensity condDensity="120.0 mS_per_cm2" id="NaConductance_all" ionChannel="NaConductance" ion="na" erev="50.0 mV"/>

                <channelDensity condDensity="0.3 mS_per_cm2" id="PassiveCond_all" ionChannel="PassiveCond" ion="non_specific" erev="-54.3 mV"/>

                <spikeThresh value="0 mV"/>

                <specificCapacitance value="1.0 uF_per_cm2"/>

                <initMembPotential value="-65.0 mV"/>

            </membraneProperties>

            <intracellularProperties>

                <resistivity value="0.03 kohm_cm"/>

            </intracellularProperties>

        </biophysicalProperties>

    </cell>

</neuroml>
