<?xml version="1.0" encoding="UTF-8"?>

<channelml xmlns="http://morphml.org/channelml/schema"
    xmlns:xsi="http://www.w3.org/2001/XMLSchema-instance"
    xmlns:meta="http://morphml.org/metadata/schema"
    xsi:schemaLocation="http://morphml.org/channelml/schema  http://www.neuroml.org/NeuroMLValidator/NeuroMLFiles/Schemata/v1.8.1/Level2/ChannelML_v1.8.1.xsd"
    units="Physiological Units">

    <meta:notes>ChannelML file describing a synaptic mechanism</meta:notes>

    <synapse_type name="NMDASyn">

        <status value="stable"/>

        <meta:notes>Example of an NMDA receptor synaptic mechanism, based on Maex DeSchutter 1998,
        Gabbiani et al, 1994. Mappings exist for NEURON and GENESIS.</meta:notes>

        <meta:authorList>
            <meta:modelTranslator>
                <meta:name>Padraig Gleeson</meta:name>
                <meta:institution>UCL</meta:institution>
                <meta:email>p.gleeson - at - ucl.ac.uk</meta:email>
            </meta:modelTranslator>
        </meta:authorList>

        <meta:publication>
            <meta:fullTitle>Gabbiani F, Midtgaard J, Knopfel T. Synaptic integration in a model of cerebellar granule cells.</meta:fullTitle>
            <meta:pubmedRef>http://www.ncbi.nlm.nih.gov/entrez/query.fcgi?db=pubmed&amp;cmd=Retrieve&amp;dopt=AbstractPlus&amp;list_uids=7527078</meta:pubmedRef>
        </meta:publication>

        <meta:publication>
            <meta:fullTitle>Maex, R and De Schutter, E.
            Synchronization of Golgi and Granule Cell Firing in a Detailed Network Model of the
            cerebellar Granule Cell Layer. J Neurophysiol, Nov 1998; 80: 2521 - 2537</meta:fullTitle>
            <meta:pubmedRef>http://www.ncbi.nlm.nih.gov/entrez/query.fcgi?cmd=Retrieve&amp;db=PubMed&amp;list_uids=9819260&amp;dopt=Abstract</meta:pubmedRef>
        </meta:publication>

        <meta:neuronDBref>
        <meta:modelName>Glutamate receptors, Ionotropic</meta:modelName>
            <meta:uri>http://senselab.med.yale.edu/senselab/NeuronDB/receptors2.asp#Glutamate%20receptors,Ionotropic</meta:uri>
        </meta:neuronDBref>

        <!--SI:
        <blocking_syn max_conductance="2e-8" rise_time="1e-3" decay_time="13.3333e-3" reversal_potential="0">
            <block species="mg" conc="1.2" eta="0.5206857564" gamma="62"/>
        </blocking_syn>-->
        <!-- Physiological -->
        <blocking_syn max_conductance="2e-5" rise_time="1" decay_time="13.3333" reversal_potential="0">
            <block species="mg" conc="1.2e-6" eta="0.5206857564e6" gamma="62e-3"/>
        </blocking_syn>

    </synapse_type>

</channelml>
